# F16Q4 - Trådløse Sensor Netværk og Elektronik [240112U171]
# LAB 1 - Energy/Power lab exercise
P_mote(t) == U_mote(t)*I_mote(t)
E_mote == integral(P_mote(t), t = t_0 .. t_1)
# We need to find U_mote(t) and I_mote(t)
U_mote(t) == U_battery(t) - U_shunt(t)
I_mote(t) == I_shunt(t) == U_shunt(t)/R_shunt
# We need to find U_shunt(t), R_shunt and U_battery(t)
# Red LED Blink, 100 ms between flash
U_battery(t) := 3.1 V
t_0 := 0 s
U_shunt(t) := 1.7 mV
t_1 := 5 s
R_shunt := 10 Ω
U_mote(t) := U_battery(t) - U_shunt(t) → 3.1*V + (-1.7*mV) = 3.0983 V
I_mote(t) := U_shunt(t)/R_shunt → 0.17*mV/Ω = 0.00017 A
P_mote(t) := U_mote(t)*I_mote(t) → 0.000526711*A*V
E_mote := integral(P_mote(t), t = t_0 .. t_1) = 0.00263355 J
# Red LED ON
U_battery(t) := 3.1 V
t_0 := 0 s
U_shunt(t) := 24.9 mV
t_1 := 60 s
R_shunt := 10 Ω
U_mote(t) := U_battery(t) - U_shunt(t) → 3.1*V + (-24.9*mV) = 3.0751 V
I_mote(t) := U_shunt(t)/R_shunt → 2.49*mV/Ω = 0.00249 A
P_mote(t) := U_mote(t)*I_mote(t) → 0.007656999*A*V
E_mote := integral(P_mote(t), t = t_0 .. t_1) = 0.45942 J
# Green LED ON
U_battery(t) := 3.1 V
t_0 := 0 s
U_shunt(t) := 46 mV
t_1 := 60 s
R_shunt := 10 Ω
U_mote(t) := U_battery(t) - U_shunt(t) → 3.1*V - 46*mV = 3.054 V
I_mote(t) := U_shunt(t)/R_shunt → 23*mV/(5*Ω) = 0.0046 A
P_mote(t) := U_mote(t)*I_mote(t) → 0.0140484*A*V
E_mote := integral(P_mote(t), t = t_0 .. t_1) = 0.842904 J
# Blue LED ON
U_battery(t) := 3.1 V
t_0 := 0 s
U_shunt(t) := 16 mV
t_1 := 60 s
R_shunt := 10 Ω
U_mote(t) := U_battery(t) - U_shunt(t) → 3.1*V - 16*mV = 3.084 V
I_mote(t) := U_shunt(t)/R_shunt → 8*mV/(5*Ω) = 0.0016 A
P_mote(t) := U_mote(t)*I_mote(t) → 0.0049344*A*V
E_mote := integral(P_mote(t), t = t_0 .. t_1) = 0.296064 J
# Tx, 250 ms between
U_battery(t) := 3.1 V
t_0 := 0 s
U_shunt(t) := 185 mV
t_1 := 60 s
R_shunt := 10 Ω
U_mote(t) := U_battery(t) - U_shunt(t) → 3.1*V - 185*mV = 2.915 V
I_mote(t) := U_shunt(t)/R_shunt → 37*mV/(2*Ω) = 0.0185 A
P_mote(t) := U_mote(t)*I_mote(t) → 0.0539275*A*V
E_mote := integral(P_mote(t), t = t_0 .. t_1) = 3.23565 J
# Rx and Tx, 250 ms between
U_battery(t) := 3.1 V
t_0 := 0 s
U_shunt(t) := 215 mV
t_1 := 60 s
R_shunt := 10 Ω
U_mote(t) := U_battery(t) - U_shunt(t) → 3.1*V - 215*mV = 2.885 V
I_mote(t) := U_shunt(t)/R_shunt → 43*mV/(2*Ω) = 0.0215 A
P_mote(t) := U_mote(t)*I_mote(t) → 0.0620275*A*V
E_mote := integral(P_mote(t), t = t_0 .. t_1) = 3.72165 J
